// COMSOL Multiphysics 6.2.0.415 model "test.mph"
// Outline of the model tree

Parameters
  p_inj = 250 [kPa]
  param2 = pi  // A parameter to test if API reads a non-default parameter collection

Functions
  rm1: Ramp
  rm2: Ramp | location = 5; cutoff = 1
  wv1: Wave "Waveform 1" | period = 5*2/3; phase = -pi/2; baseline = 0.5+0.1; amplitude = 0.5
  int1: Interpolation | table = {{0, 100}, {30, 0}}; fununit = kPa; argunit = mm

Variables
  var1 "Variables 1"
    phi = 0.3
    k = 1e-20 [m^2]

Selections
  sel1: Explicit on points 3, 4, 7, 10, 13, 14

Common definitions
  minpt1: CommonInputDef "Model Input 1" on domains 1, 2 | quantity = pressure; value = l; minpScalar = l

Geometry
  geom1 "Geometry 1" (2D axisymmetric, length unit mm)
    r1: Rectangle | size = {30, 10}
    c1: Circle | pos = {15, 5}; r = 2
    pol1: Polygon | type = open; source = table; table = {{15, 10}, {15, 0}}
    dif1: Difference | input = pol1, r1; input2 = c1
    pt1: Point | p = {6, 7}
    pt2: Point | p = {24, 7}
    pt3: Point | p = {10, 5}
    pt4: Point | p = {20.5, 5}
    pt5: Point | p = {15, 1.5}
    pt6: Point | p = {15, 8.5}
    fin: Finalize "Form Union"

Materials
  mat1: Common "Water, liquid" on all domains
    def "Basic"
      thermalexpansioncoefficient = alpha_p(T)
      bulkviscosity = muB(T)
      dynamicviscosity = eta(T)
      ratioofspecificheat = gamma_w(T)
      electricconductivity = 5.5e-6[S/m]
      heatcapacity = Cp(T)
      density = rho(T)
      thermalconductivity = k(T)
      soundspeed = cs(T)
      eta: Piecewise
        arg = T
        pieces = 
          {273.15, 413.15, 1.3799566804-0.021224019151*T^1+1.3604562827E-4*T^2-4.6454090319E-7*T^3+8.9042735735E-10*T^4-9.0790692686E-13*T^5+3.8457331488E-16*T^6}
          {413.15, 553.75, 0.00401235783-2.10746715E-5*T^1+3.85772275E-8*T^2-2.39730284E-11*T^3}
        argunit = K
        fununit = Pa*s
      Cp: Piecewise | arg = T; pieces = {273.15, 553.75, 12010.1471-80.4072879*T^1+0.309866854*T^2-5.38186884E-4*T^3+3.62536437E-7*T^4}; argunit = K; fununit = J/(kg*K)
      rho: Piecewise
        arg = T
        smooth = contd1
        pieces = 
          {273.15, 293.15, 6.3092789034e-05*T^3-0.0603676398829*T^2+18.9229382407066*T-950.704055329848}
          {293.15, 373.15, 1.0335053319e-05*T^3-0.0133950656345*T^2+4.96928883266*T+432.257114008512}
        argunit = K
        fununit = kg/m^3
      k: Piecewise | arg = T; pieces = {273.15, 553.75, -0.869083936+0.00894880345*T^1-1.58366345E-5*T^2+7.97543259E-9*T^3}; argunit = K; fununit = W/(m*K)
      cs: Interpolation | table = {{273, 1403}, {278, 1427}, {283, 1447}, {293, 1481}, {303, 1507}, {313, 1526}, {323, 1541}, {333, 1552}, {343, 1555}, {353, 1555}, {363, 1550}, {373, 1543}}; interp = piecewisecubic; fununit = m/s; argunit = K
      an1: Analytic | funcname = alpha_p; expr = -1/rho(T)*d(rho(T),T); args = T; fununit = 1/K; argunit = K
      an2: Analytic | funcname = gamma_w; expr = 1+(T/Cp(T))*(alpha_p(T)*cs(T))^2; args = T; fununit = 1; argunit = K
      an3: Analytic | funcname = muB; expr = 2.79*eta(T); args = T; fununit = Pa*s; argunit = K

Physics
  dl: PorousMediaFlowDarcy "Darcy's Law" on all domains
    dependent variable p
    porous1: PorousMedium (default)
      fluid1: FluidPorousMedium "Fluid 1" (default) | rho_mat = from_mat
      pm1: PorousMatrixPorousMedium "Porous Matrix 1" (default)
        epsilon_mat = userdef
        epsilon = 0.3
        kappa_mat = userdef
        kappa = k
    axi1: AxialSymmetry (default)
    nf1: NoFlow (default)
    init1: init "Initial Values 1" (default)
    pr1: Pressure on boundaries 2, 5 | p0 = wv1(t[d^-1])*p_inj
    pr2: Pressure on boundaries 3, 9 | p0 = int1(r)*rm2(t[1/d])

Mesh
  mesh1 "Mesh 1"
    size: MeshSizeDefault | table = cfd; hauto = 4
    ftri1: FreeTri "Free Triangular 1" on remaining entities

Studies
  std1 "Study 1"
    time: Transient "Time Dependent" | tunit = d; tlist = range(0,0.1,5)
  std2 "Study 2"
    time: Transient "Time Dependent"
      tunit = d
      tlist = range(5,0.1,10)
      useinitsol = on
      initmethod = sol
      initstudy = std1
      initsol = sol1

Solver configurations
  sol1 "Solution 1" (study std1)
    v1: Variables "Dependent Variables 1"
    t1: Time "Time-Dependent Solver 1" | tlist = range(0,0.1,5); rtol = 0.005; maxorder = 2; stabcntrl = on
      fc1: FullyCoupled
        linsolver = d1
        maxiter = 8
        jtech = once
        stabacc = aacc
        aaccdim = 5
        aaccmix = 0.9
        aaccdelay = 1
      d1: Direct "Direct, pressure (dl)" | linsolver = pardiso; pivotperturb = 1.0E-13
  sol2 "Solution 2" (study std2)
    v1: Variables "Dependent Variables 1"
    t1: Time "Time-Dependent Solver 1" | tlist = range(5,0.1,10); rtol = 0.005; maxorder = 2; stabcntrl = on
      fc1: FullyCoupled
        linsolver = d1
        maxiter = 8
        jtech = once
        stabacc = aacc
        aaccdim = 5
        aaccmix = 0.9
        aaccdelay = 1
      d1: Direct "Direct, pressure (dl)" | linsolver = pardiso; pivotperturb = 1.0E-13

Datasets
  dset1: Solution | solution = sol1
  rev1: Revolve2D "Revolution 2D" | data = dset1; startangle = -90; revangle = 225
  dset2: Solution | solution = sol2
  rev2: Revolve2D "Revolution 2D 1" | data = dset2; startangle = -90; revangle = 225
  cln1: CutLine2D | data = dset1; genpoints = {{10, 0}, {10, 10}}

Derived values
  pev1: EvalPoint "Point Evaluation 1" on points 3, 4, 7, 10, 13, 14 | data = dset1; table = tbl1; expr = dl.U
  pev2: EvalPoint "Point Evaluation 2" | data = dset1; expr = p

Tables
  tbl1: Table
    // Point Evaluation 1 {pev1}
    Time (d) | Total Darcy velocity magnitude (m/s), Point: 3 | Total Darcy velocity magnitude (m/s), Point: 4 | Total Darcy velocity magnitude (m/s), Point: 7 | Total Darcy velocity magnitude (m/s), Point: 10 | Total Darcy velocity magnitude (m/s), Point: 13 | Total Darcy velocity magnitude (m/s), Point: 14
    0 | 2.20544e-20 | 2.37888e-20 | 1.23544e-20 | 1.23517e-20 | 2.28977e-20 | 2.20273e-20
    0.1 | 2.19882e-12 | 2.37174e-12 | 1.23173e-12 | 1.23146e-12 | 2.28289e-12 | 2.19611e-12
    0.2 | 8.71747e-12 | 9.40302e-12 | 4.88334e-12 | 4.88225e-12 | 9.0508e-12 | 8.70673e-12
    0.3 | 1.9323e-11 | 2.08425e-11 | 1.08243e-11 | 1.08219e-11 | 2.00618e-11 | 1.92992e-11
    0.4 | 3.36417e-11 | 3.62873e-11 | 1.88454e-11 | 1.88412e-11 | 3.4928e-11 | 3.36002e-11
    0.5 | 5.11672e-11 | 5.5191e-11 | 2.86628e-11 | 2.86564e-11 | 5.31236e-11 | 5.11041e-11
    0.6 | 7.1279e-11 | 7.68844e-11 | 3.9929e-11 | 3.992e-11 | 7.40044e-11 | 7.11911e-11
    0.7 | 9.32647e-11 | 1.00599e-10 | 5.22449e-11 | 5.22332e-11 | 9.68308e-11 | 9.31497e-11
    0.8 | 1.16345e-10 | 1.25495e-10 | 6.51741e-11 | 6.51595e-11 | 1.20794e-10 | 1.16202e-10
    0.9 | 1.3966e-10 | 1.50642e-10 | 7.82343e-11 | 7.82168e-11 | 1.45e-10 | 1.39487e-10
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
Plots
  pg1: PlotGroup2D "Pressure (dl)" | data = dset1; dataisaxisym = on
    surf1: Surface | expr = p
  pg2: PlotGroup3D "Pressure, 3D (dl)" | data = rev1
    surf1: Surface | expr = p
  pg3: PlotGroup2D "u" | data = dset2; dataisaxisym = on
    surf1: Surface | expr = dl.U
    str1: Streamline on boundaries 1-3, 5, 9-14 | expr = {dl.u, dl.w}; pointtype = arrow; arrowlength = logarithmic
  pg4: PlotGroup2D "Pressure + velocity" | data = dset2; dataisaxisym = on
    surf1: Surface | data = dset2; expr = p; unit = kPa
    surf2: Surface | expr = dl.u; unit = µm/s
      trn1: Translation | trans = {32, 0}
  pg5: PlotGroup3D "Pressure, 3D (dl) 1" | data = rev2
    surf1: Surface | expr = p
  pg6: PlotGroup1D "1D Plot Group 6" | data = dset1
    ptgr1: PointGraph on selection sel1 | expr = p; unit = MPa
  pg7: PlotGroup1D "1D Plot Group 7" | data = cln1
    lngr1: LineGraph | expr = p